// SBML level 3 version 2

model Test_09()

  // Compartments:
  compartment Cell = 1;

  // Species:
  substanceOnly species S0_0 in Cell = 10;
  substanceOnly species S0_1 in Cell = 10;
  substanceOnly species S0_2 in Cell = 10;
  substanceOnly species S0_3 in Cell = 10;
  substanceOnly species S0_4 in Cell = 10;
  substanceOnly species S1_0 in Cell = 0;
  substanceOnly species S1_1 in Cell = 0;
  substanceOnly species S1_2 in Cell = 0;
  substanceOnly species S1_3 in Cell = 0;
  substanceOnly species S1_4 in Cell = 0;

  // Parameters:
  n = 5;

  // Assignment rules:
  k_0 := 0.1*(0 + 1);
  k_1 := 0.1*(1 + 1);
  k_2 := 0.1*(2 + 1);
  k_3 := 0.1*(3 + 1);
  k_4 := 0.1*(4 + 1);

  // Reactions:
  R0_0: S0_0 => S1_0; k_0*S0_0;
  R0_1: S0_1 => S1_1; k_1*S0_1;
  R0_2: S0_2 => S1_2; k_2*S0_2;
  R0_3: S0_3 => S1_3; k_3*S0_3;
  R0_4: S0_4 => S1_4; k_4*S0_4;
end
