// SBML level 3 version 2

model twoRateRulesAllReactions()

  // Compartments:
  compartment default_compartment = 1;

  // Species:
  species A in default_compartment = 1;
  species B in default_compartment = 1;
  species C in default_compartment = 1;
  species E in default_compartment = 1;
  species F in default_compartment = 1;

  // Parameters:
  k0 = 0.5;
  Aeq = 2;
  k1 = 0.8;
  k2 = 0.6;
  k3 = 0.4;
  k4 = 0.3;
  Eeq = 3;
  k5 = 0.7;
  k6 = 0.5;

  // Reactions:
  A_rate_rule: -> A; k0*(Aeq - A);
  J0: -> B; k1*A;  // modifiers: A
  J1: B -> C; k2*B;
  J2: C -> ; k3*C;
  E_rate_rule: -> E; k4*(Eeq - E);
  J3: -> F; k5*E;  // modifiers: E
  J4: F -> ; k6*F;
end
