// SBML level 3 version 2

function L_PFK(L, CiATP, KiATP, CAMP, KAMP, CF26BP, KF26BP, CF16BP, KF16BP, AT, AM, F16, F26)
  L*((1 + CiATP*(AT/KiATP))/(1 + AT/KiATP))^2*((1 + CAMP*(AM/KAMP))/(1 + AM/KAMP))^2*((1 + CF26BP*F26/KF26BP + CF16BP*F16/KF16BP)/(1 + F26/KF26BP + F16/KF16BP))^2;
end

function R_PFK(KmF6P, KmATP, g, AT, F6)
  1 + F6/KmF6P + AT/KmATP + g*(F6/KmF6P)*(AT/KmATP);
end

function T_PFK(CATP, KmATP, AT)
  1 + CATP*(AT/KmATP);
end

model __main()

  // Compartments:
  compartment extracellular = 1;
  compartment cytosol = 1;

  // Species:
  species GLCi in cytosol = 0.09875869/cytosol;
  species G6P in cytosol = 1.033246/cytosol;
  species F6P in cytosol = 0.1128128/cytosol;
  species F16P in cytosol = 0.6019076/cytosol;
  species TRIO in cytosol = 0.7775235/cytosol;
  species BPG in cytosol = 0.0003295739/cytosol;
  species P3G in cytosol = 0.356484/cytosol;
  species P2G in cytosol = 0.04484371/cytosol;
  species PEP in cytosol = 0.07361684/cytosol;
  species PYR in cytosol = 8.523152/cytosol;
  species ACE in cytosol = 0.1701145/cytosol;
  species NAD in cytosol = 1.54556/cytosol;
  species NADH in cytosol = 0.04444023/cytosol;
  species $CO2 in cytosol = 1;
  species $GLCo in extracellular = 50;
  species $ETOH in cytosol = 50;
  species $GLY in cytosol = 0.15;
  species ATP in cytosol = 2.508391/cytosol;
  species ADP in cytosol = 1.2921/cytosol;
  species AMP in cytosol = 0.299509/cytosol;

  // Parameters:
  e_vGLK = 1;
  vGLK_VmGLK = 226.452 mMpermin;
  vGLK_KmGLKGLCi = 0.08 mM;
  vGLK_KmGLKATP = 0.15 mM;
  vGLK_KeqGLK = 3800 dimensionless;
  vGLK_KmGLKG6P = 30 mM;
  vGLK_KmGLKADP = 0.23 mM;
  e_vPGI = 1;
  vPGI_VmPGI_2 = 339.677 mMpermin;
  vPGI_KmPGIG6P_2 = 1.4 mM;
  vPGI_KeqPGI_2 = 0.314 dimensionless;
  vPGI_KmPGIF6P_2 = 0.3 mM;
  e_vGLYCO = 1;
  vGLYCO_KGLYCOGEN_3 = 6 mMpermin;
  e_vTreha = 1;
  vTreha_KTREHALOSE = 2.4 mMpermin;
  e_vPFK = 1;
  vPFK_VmPFK = 182.903 mMpermin;
  gR = 5.12 dimensionless;
  KmPFKF6P = 0.1 mM;
  KmPFKATP = 0.71 mM;
  Lzero = 0.66 dimensionless;
  CiPFKATP = 100 dimensionless;
  KiPFKATP = 0.65 mM;
  CPFKAMP = 0.0845 dimensionless;
  KPFKAMP = 0.0995 mM;
  CPFKF26BP = 0.0174 dimensionless;
  KPFKF26BP = 0.000682 mM;
  CPFKF16BP = 0.397 dimensionless;
  KPFKF16BP = 0.111 mM;
  F26BP = 0.02;
  CPFKATP = 3 dimensionless;
  e_vALD = 1;
  vALD_VmALD = 322.258 mMpermin;
  vALD_KmALDF16P = 0.3 mM;
  KeqTPI = 0.045 dimensionless;
  vALD_KeqALD = 0.069 dimensionless;
  vALD_KmALDGAP = 2 mM;
  vALD_KmALDDHAP = 2.4 mM;
  vALD_KmALDGAPi = 10 mM;
  e_vGAPDH = 1;
  vGAPDH_VmGAPDHf = 1184.52 mMpermin;
  vGAPDH_KmGAPDHGAP = 0.21 mM;
  vGAPDH_KmGAPDHNAD = 0.09 mM;
  vGAPDH_VmGAPDHr = 6549.8 mMpermin;
  vGAPDH_KmGAPDHBPG = 0.0098 mM;
  vGAPDH_KmGAPDHNADH = 0.06 mM;
  e_vPGK = 1;
  vPGK_VmPGK = 1306.45 mMpermin;
  vPGK_KmPGKP3G = 0.53 mM;
  vPGK_KmPGKATP = 0.3 mM;
  vPGK_KeqPGK = 3200 dimensionless;
  vPGK_KmPGKBPG = 0.003 mM;
  vPGK_KmPGKADP = 0.2 mM;
  e_vPGM = 1;
  vPGM_VmPGM = 2525.81 mMpermin;
  vPGM_KmPGMP3G = 1.2 mM;
  vPGM_KeqPGM = 0.19 dimensionless;
  vPGM_KmPGMP2G = 0.08 mM;
  e_vENO = 1;
  vENO_VmENO = 365.806 mMpermin;
  vENO_KmENOP2G = 0.04 mM;
  vENO_KeqENO = 6.7 dimensionless;
  vENO_KmENOPEP = 0.5 mM;
  e_vPYK = 1;
  vPYK_VmPYK = 1088.71 mMpermin;
  vPYK_KmPYKPEP = 0.14 mM;
  vPYK_KmPYKADP = 0.53 mM;
  vPYK_KeqPYK = 6500 dimensionless;
  vPYK_KmPYKPYR = 21 mM;
  vPYK_KmPYKATP = 1.5 mM;
  e_vPDC = 1;
  vPDC_VmPDC = 174.194 mMpermin;
  vPDC_nPDC = 1.9 dimensionless;
  vPDC_KmPDCPYR = 4.33 mM;
  e_vSUC = 1;
  vSUC_KSUCC = 21.4;
  e_vGLT = 1;
  vGLT_VmGLT = 97.264 mmolepermin;
  vGLT_KmGLTGLCo = 1.1918 mM;
  vGLT_KeqGLT = 1 mM;
  vGLT_KmGLTGLCi = 1.1918 mM;
  e_vADH = 1;
  vADH_VmADH = 810 mMpermin;
  vADH_KiADHNAD = 0.92 mM;
  vADH_KmADHETOH = 17 mM;
  vADH_KeqADH = 6.9e-5 dimensionless;
  vADH_KmADHNAD = 0.17 mM;
  vADH_KmADHNADH = 0.11 mM;
  vADH_KiADHNADH = 0.031 mM;
  vADH_KmADHACE = 1.11;
  vADH_KiADHACE = 1.1;
  vADH_KiADHETOH = 90;
  e_vG3PDH = 1;
  vG3PDH_VmG3PDH = 70.15;
  vG3PDH_KmG3PDHDHAP = 0.4 mM;
  vG3PDH_KmG3PDHNADH = 0.023 mM;
  vG3PDH_KeqG3PDH = 4300 dimensionless;
  vG3PDH_KmG3PDHGLY = 1 mM;
  vG3PDH_KmG3PDHNAD = 0.93 mM;
  e_vATP = 1;
  vATP_KATPASE = 33.7 permin;
  EAK = 1.302292e-14;
  k1 = 0.45;
  k2 = 1;
  SUM_P = 4.1;
  KeqAK = 0.45 dimensionless;

  // Reactions:
  vGLK: GLCi + ATP -> G6P + ADP; e_vGLK*(cytosol*vGLK_VmGLK/(vGLK_KmGLKGLCi*vGLK_KmGLKATP))*(GLCi*ATP - G6P*ADP/vGLK_KeqGLK)/((1 + GLCi/vGLK_KmGLKGLCi + G6P/vGLK_KmGLKG6P)*(1 + ATP/vGLK_KmGLKATP + ADP/vGLK_KmGLKADP));
  vPGI: G6P -> F6P; e_vPGI*(cytosol*vPGI_VmPGI_2/vPGI_KmPGIG6P_2)*(G6P - F6P/vPGI_KeqPGI_2)/(1 + G6P/vPGI_KmPGIG6P_2 + F6P/vPGI_KmPGIF6P_2);
  vGLYCO: G6P + ATP => ADP; e_vGLYCO*cytosol*vGLYCO_KGLYCOGEN_3;
  vTreha: 2 G6P + ATP => ADP; e_vTreha*cytosol*vTreha_KTREHALOSE;
  vPFK: F6P + ATP => F16P + ADP; e_vPFK*cytosol*vPFK_VmPFK*gR*(F6P/KmPFKF6P)*(ATP/KmPFKATP)*R_PFK(KmPFKF6P, KmPFKATP, gR, ATP, F6P)/(R_PFK(KmPFKF6P, KmPFKATP, gR, ATP, F6P)^2 + L_PFK(Lzero, CiPFKATP, KiPFKATP, CPFKAMP, KPFKAMP, CPFKF26BP, KPFKF26BP, CPFKF16BP, KPFKF16BP, ATP, AMP, F16P, F26BP)*T_PFK(CPFKATP, KmPFKATP, ATP)^2);  // modifiers: AMP
  vALD: F16P -> 2 TRIO; e_vALD*(cytosol*vALD_VmALD/vALD_KmALDF16P)*(F16P - KeqTPI/(1 + KeqTPI)*TRIO*(1/(1 + KeqTPI))*TRIO/vALD_KeqALD)/(1 + F16P/vALD_KmALDF16P + KeqTPI/(1 + KeqTPI)*TRIO/vALD_KmALDGAP + 1/(1 + KeqTPI)*TRIO/vALD_KmALDDHAP + KeqTPI/(1 + KeqTPI)*TRIO*(1/(1 + KeqTPI))*TRIO/(vALD_KmALDGAP*vALD_KmALDDHAP) + F16P*(KeqTPI/(1 + KeqTPI))*TRIO/(vALD_KmALDGAPi*vALD_KmALDF16P));
  vGAPDH: TRIO + NAD -> BPG + NADH; e_vGAPDH*cytosol*(vGAPDH_VmGAPDHf*(KeqTPI/(1 + KeqTPI))*TRIO*NAD/(vGAPDH_KmGAPDHGAP*vGAPDH_KmGAPDHNAD) - vGAPDH_VmGAPDHr*BPG*NADH/(vGAPDH_KmGAPDHBPG*vGAPDH_KmGAPDHNADH))/((1 + KeqTPI/(1 + KeqTPI)*TRIO/vGAPDH_KmGAPDHGAP + BPG/vGAPDH_KmGAPDHBPG)*(1 + NAD/vGAPDH_KmGAPDHNAD + NADH/vGAPDH_KmGAPDHNADH));
  vPGK: BPG + ADP -> P3G + ATP; e_vPGK*(cytosol*vPGK_VmPGK/(vPGK_KmPGKP3G*vPGK_KmPGKATP))*(vPGK_KeqPGK*BPG*ADP - P3G*ATP)/((1 + BPG/vPGK_KmPGKBPG + P3G/vPGK_KmPGKP3G)*(1 + ATP/vPGK_KmPGKATP + ADP/vPGK_KmPGKADP));
  vPGM: P3G -> P2G; e_vPGM*(cytosol*vPGM_VmPGM/vPGM_KmPGMP3G)*(P3G - P2G/vPGM_KeqPGM)/(1 + P3G/vPGM_KmPGMP3G + P2G/vPGM_KmPGMP2G);
  vENO: P2G -> PEP; e_vENO*(cytosol*vENO_VmENO/vENO_KmENOP2G)*(P2G - PEP/vENO_KeqENO)/(1 + P2G/vENO_KmENOP2G + PEP/vENO_KmENOPEP);
  vPYK: PEP + ADP -> PYR + ATP; e_vPYK*(cytosol*vPYK_VmPYK/(vPYK_KmPYKPEP*vPYK_KmPYKADP))*(PEP*ADP - PYR*ATP/vPYK_KeqPYK)/((1 + PEP/vPYK_KmPYKPEP + PYR/vPYK_KmPYKPYR)*(1 + ATP/vPYK_KmPYKATP + ADP/vPYK_KmPYKADP));
  vPDC: PYR => ACE + $CO2; e_vPDC*cytosol*vPDC_VmPDC*(PYR^vPDC_nPDC/vPDC_KmPDCPYR^vPDC_nPDC)/(1 + PYR^vPDC_nPDC/vPDC_KmPDCPYR^vPDC_nPDC);
  vSUC: 2 ACE + 3 NAD + 4 ATP => 3 NADH + 4 ADP; e_vSUC*cytosol*vSUC_KSUCC*ACE;
  vGLT: $GLCo -> GLCi; e_vGLT*(vGLT_VmGLT/vGLT_KmGLTGLCo)*(GLCo - GLCi/vGLT_KeqGLT)/(1 + GLCo/vGLT_KmGLTGLCo + GLCi/vGLT_KmGLTGLCi + 0.91*GLCo*GLCi/(vGLT_KmGLTGLCo*vGLT_KmGLTGLCi));
  vADH: ACE + NADH -> NAD + $ETOH; e_vADH*(-cytosol)*(vADH_VmADH/(vADH_KiADHNAD*vADH_KmADHETOH)*(NAD*ETOH - NADH*ACE/vADH_KeqADH)/(1 + NAD/vADH_KiADHNAD + vADH_KmADHNAD*ETOH/(vADH_KiADHNAD*vADH_KmADHETOH) + vADH_KmADHNADH*ACE/(vADH_KiADHNADH*vADH_KmADHACE) + NADH/vADH_KiADHNADH + NAD*ETOH/(vADH_KiADHNAD*vADH_KmADHETOH) + vADH_KmADHNADH*NAD*ACE/(vADH_KiADHNAD*vADH_KiADHNADH*vADH_KmADHACE) + vADH_KmADHNAD*ETOH*NADH/(vADH_KiADHNAD*vADH_KmADHETOH*vADH_KiADHNADH) + NADH*ACE/(vADH_KiADHNADH*vADH_KmADHACE) + NAD*ETOH*ACE/(vADH_KiADHNAD*vADH_KmADHETOH*vADH_KiADHACE) + ETOH*NADH*ACE/(vADH_KiADHETOH*vADH_KiADHNADH*vADH_KmADHACE)));
  vG3PDH: TRIO + NADH => NAD + $GLY; e_vG3PDH*(cytosol*vG3PDH_VmG3PDH/(vG3PDH_KmG3PDHDHAP*vG3PDH_KmG3PDHNADH))*(1/(1 + KeqTPI)*TRIO*NADH - GLY*NAD/vG3PDH_KeqG3PDH)/((1 + 1/(1 + KeqTPI)*TRIO/vG3PDH_KmG3PDHDHAP + GLY/vG3PDH_KmG3PDHGLY)*(1 + NADH/vG3PDH_KmG3PDHNADH + NAD/vG3PDH_KmG3PDHNAD));
  vATP: ATP -> ADP; e_vATP*cytosol*vATP_KATPASE*ATP;
  vAK: 2 ADP -> AMP + ATP; EAK*(k1*ADP^2 - k2*AMP*ATP);

  // Unit definitions:
  unit mM = 1;
  unit mMpermin = 1;
  unit mmolepermin = 1;
  unit permin = 1;
end
