// SBML level 2 version 4

model AMPA16_v3()
  // AMPA 16 states from Robert et Howe et al 2003 Optimized by RG Current calculation by NA Permeability for Ca2+ Na+ K+ by NA Add variable nbAMPA by NA May, 5, 2010 version 3: date: 2010 - 11 - 30 author: JMB based on v2 Added Vm as input so EPSP can be linked to the Vm of the AMPA model version 4: date: 2011 - 05 - 15 author: JMB based on v3 Added units for new versions of the parser! version 5: date: 2011 - 06 - 14 author: JMB based on v4 Added species LTP_ampaNbModFactor to have TLP modulate the number of ampa-r ============================= version 6 date: 2 Nov 2011 added kinetic parameters for ampakine modulation nicolas.

  // Compartments:
  compartment default = 1 volume;

  // Species:
  species R0 in default = 1/default;
  species R1 in default = 0;
  species R2 in default = 0;
  species R3 in default = 0;
  species R4 in default = 0;
  species $Glu in default = 0;
  species D0 in default = 0;
  species D1 in default = 0;
  species D2 in default = 0;
  species D3 in default = 0;
  species D4 in default = 0;
  species E2 in default = 0;
  species E3 in default = 0;
  species E4 in default = 0;
  species O2 in default = 0;
  species O3 in default = 0;
  species O4 in default = 0;
  substanceOnly species $Vm in default = -60;
  substanceOnly species $LTP_ampaNbModFactor in default = 1;

  // Parameters:
  kass_re1 = 10 per_mM_per_msec;
  kdiss_re1 = 7 per_msec;
  kass_re5 = 10 per_mM_per_msec;
  kdiss_re5 = 0.00041 per_msec;
  kass_re11 has per_msec;
  kdiss_re11 = 0.001 per_msec;
  kass_re12 has per_msec;
  kdiss_re12 = 0.017 per_msec;
  kass_re16 = 0.55 per_msec;
  kdiss_re16 has per_msec;
  kass_re19 = 0.2 per_msec;
  kdiss_re19 = 0.035 per_msec;
  conduc_O2 = 9 pS; conduc_O2 is "conductance for state O2";
  conduc_O3 = 15 pS; conduc_O3 is "conductance for state O3";
  conduc_O4 = 21 pS; conduc_O4 is "conductance for state 04";
  Erev_AMPA = 0 mV; Erev_AMPA is "AMPA reversal potential";
  current_AMPA has pA; current_AMPA is "AMPA current";
  sumOpen has dimensionless; sumOpen is "sumOpen = O2+O3+O4";
  PNa = 50 percent; PNa is "Permeability for Sodium (Na)";
  PK = 49.5 percent; PK is "Permeability for Potassium (K)";
  PCa = 0.5 percent; PCa is "Permeability for Calcium (Ca)";
  ICa_AMPA has pA; ICa_AMPA is "AMPA mediated current by Ca";
  INa_AMPA has pA; INa_AMPA is "AMPA mediated current by Na";
  IK_AMPA has pA; IK_AMPA is "AMPA mediated current by K";
  nbAMPAR = 1 dimensionless;
  NewNbAMPAR has dimensionless;
  Deact_factor = 1 dimensionless; Deact_factor is "1.4601 for 1 Mm and 1.9725 for 5 mM";
  Desens_factor = 1 dimensionless; Desens_factor is "1.8560 for 1mM and 13.4046 for 5 mM";
  kdiss_re16_Init = 0.3 per_msec;
  kass_re11_Init = 3.3e-6 per_msec;
  kass_re12_Init = 0.42 per_msec;

  // Assignment rules:
  current_AMPA := (conduc_O2*O2 + conduc_O3*O3 + conduc_O4*O4)*(Vm - Erev_AMPA)*0.001*NewNbAMPAR;
  sumOpen := O2 + O3 + O4;
  INa_AMPA := PNa/100*current_AMPA;
  IK_AMPA := PK/100*current_AMPA;
  ICa_AMPA := PCa/100*current_AMPA;
  NewNbAMPAR := nbAMPAR*LTP_ampaNbModFactor;
  kdiss_re16 := kdiss_re16_Init/Deact_factor;
  kass_re11 := kass_re11_Init/Desens_factor;
  kass_re12 := kass_re12_Init/Desens_factor;

  // Reactions:
  // mass action rate law for second order forward, first order reverse, reversible reactions, two reactants, continuous scheme
  re1: R0 + $Glu -> R1; 4*kass_re1*R0*Glu - 1*kdiss_re1*R1;
  // mass action rate law for second order forward, first order reverse, reversible reactions, two reactants, continuous scheme
  re2: R1 + $Glu -> R2; 3*kass_re1*R1*Glu - 2*kdiss_re1*R2;
  // mass action rate law for second order forward, first order reverse, reversible reactions, two reactants, continuous scheme
  re3: R2 + $Glu -> R3; 2*kass_re1*R2*Glu - 3*kdiss_re1*R3;
  // mass action rate law for second order forward, first order reverse, reversible reactions, two reactants, continuous scheme
  re4: R3 + $Glu -> R4; 1*kass_re1*R3*Glu - 4*kdiss_re1*R4;
  // mass action rate law for second order forward, first order reverse, reversible reactions, two reactants, continuous scheme
  re5: D0 + $Glu -> D1; 3*kass_re5*D0*Glu - kdiss_re5*D1;
  // mass action rate law for second order forward, first order reverse, reversible reactions, two reactants, continuous scheme
  re6: D1 + $Glu -> D2; 3*kass_re1*D1*Glu - kdiss_re1*D2;
  // mass action rate law for second order forward, first order reverse, reversible reactions, two reactants, continuous scheme
  re7: D2 + $Glu -> D3; 2*kass_re1*D2*Glu - 2*kdiss_re1*D3;
  // mass action rate law for second order forward, first order reverse, reversible reactions, two reactants, continuous scheme
  re8: D3 + $Glu -> D4; 1*kass_re1*D3*Glu - 3*kdiss_re1*D4;
  // mass action rate law for second order forward, first order reverse, reversible reactions, two reactants, continuous scheme
  re9: E2 + $Glu -> E3; 2*kass_re1*E2*Glu - kdiss_re1*E3;
  // mass action rate law for second order forward, first order reverse, reversible reactions, two reactants, continuous scheme
  re10: E3 + $Glu -> E4; kass_re1*E3*Glu - 2*kdiss_re1*E4;
  // mass action rate law for first order forward, first order reverse, reversible reactions, continuous scheme
  re11: R0 -> D0; 4*kass_re11*R0 - kdiss_re11*D0;
  // mass action rate law for first order forward, first order reverse, reversible reactions, continuous scheme
  re12: R1 -> D1; 1*kass_re12_Init*R1 - kdiss_re12*D1;
  // mass action rate law for first order forward, first order reverse, reversible reactions, continuous scheme
  re13: R2 -> D2; 2*kass_re12_Init*R2 - kdiss_re12*D2;
  // mass action rate law for first order forward, first order reverse, reversible reactions, continuous scheme
  re14: R3 -> D3; 3*kass_re12_Init*R3 - kdiss_re12*D3;
  // mass action rate law for first order forward, first order reverse, reversible reactions, continuous scheme
  re15: R4 -> D4; 4*kass_re12_Init*R4 - kdiss_re12*D4;
  // mass action rate law for first order forward, first order reverse, reversible reactions, continuous scheme
  re16: R2 -> O2; 2*kass_re16*R2 - kdiss_re16*O2;
  // mass action rate law for first order forward, first order reverse, reversible reactions, continuous scheme
  re17: R3 -> O3; 3*kass_re16*R3 - kdiss_re16*O3;
  // mass action rate law for first order forward, first order reverse, reversible reactions, continuous scheme
  re18: R4 -> O4; 4*kass_re16*R4 - kdiss_re16*O4;
  // mass action rate law for first order forward, first order reverse, reversible reactions, continuous scheme
  re19: D2 -> E2; 1*kass_re19*D2 - kdiss_re19*E2;
  // mass action rate law for first order forward, first order reverse, reversible reactions, continuous scheme
  re20: D3 -> E3; 2*kass_re19*D3 - kdiss_re19*E3;
  // mass action rate law for first order forward, first order reverse, reversible reactions, continuous scheme
  re21: D4 -> E4; 3*kass_re19*D4 - kdiss_re19*E4;

  // Unit definitions:
  unit per_mM_per_msec = litre / (1e-3 mole * 1e-3 second);
  unit per_msec = 1 / (1e-3 second);
  unit pS = 1e-12 siemens;
  unit mV = 1e-3 volt;
  unit pA = 1e-12 ampere;
  unit percent = 1;
  unit substance = mole;
  unit volume = litre;
  unit area = metre^2;
  unit length = metre;
  unit time = second;
end
