// SBML level 3 version 1

model cell()

  // Compartments:
  compartment compartment_ = 1;

  // Species:
  species $src in compartment_ = 0;
  species $waste in compartment_ = 0;
  species $Xo in compartment_ = 1;
  species $X1 in compartment_ = 0;
  species S1 in compartment_ = 0.1;
  species S2 in compartment_ = 0.25;
  species S3 in compartment_ = 0.1;

  // Parameters:
  kk1 = 10;
  k1 = 0.1;
  k_1 = 0.05;
  kk2 = 1;
  k2 = 0.15;
  k_2 = 0.067;
  kk3 = 1;
  k3 = 0.4;
  k_3 = 0.09;
  kk4 = 1;
  k4 = 0.55;
  k_4 = 0.01;

  // Reactions:
  J1: $Xo => S1; kk1*(k1*Xo - k_1*S1);
  J2: S1 => S2; kk2*(k2*S1 - k_2*S2);
  J3: S1 + S2 => S3; kk3*(k3*(S1 + S2) - k_3*S3);
  J4: S3 => $X1; kk4*(k4*S3 - k_4*X1);
end
