// SBML level 3 version 1

function fd(x)
  x^3;
end
fd is "ggh";

model l3_all()
  // m1
  // model units - substance: mole, time: time, volume: litre, area: area, length: metre, extent: mole
  // conversionFactor d

  // Compartments:
  compartment a = 1 volume;  // 4.5-D
  compartment a1;

  // Species:
  species s in a = 0;  // conversionFactor d
  substanceOnly species $s1 in a = 2.2*a;  // conversionFactor d
  species s2 in a;

  // Parameters:
  p = 2 second;
  p1 = x*p3; p1 has litre;
  p2 has litre;
  p3 = 2 litre;
  x = 2 dimensionless;
  d has dimensionless;

  // Assignment rules:
  p2 := x*p3;
  generatedId_0 := s*p;

  // Rate rules:
  p3' = p1/p;

  // Algebraic rules:
  0 = x^3;

  // Reactions:
  r: generatedId_0 s -> s2 + $s1; s*k/p;
    k = 9 litre;

  // Events:
  at (x*3) after (x < 3), priority = 1, t0=false, persistent=false, fromTrigger=false: a = x*p3;

  // Constraints:
  constraint x < 3;

  // Unit definitions:
  unit area = metre^2;
  unit volume = litre;
  unit substance = mole; substance is "ddd";
  unit time = second;
  unit ud1 = second^1.4;
end
