// SBML level 3 version 1

model Model_1()
  // New Model
  // model units - substance: substance, time: time, volume: volume, area: area, length: length, extent: substance

  // Compartments:
  compartment compartment_1 = 1 litre;

  // Species:
  species B in compartment_1 = 1;  // substance in mole
  species C in compartment_1 = 1;  // substance in mole
  species $A in compartment_1 = 10;  // substance in mole
  species D in compartment_1 = 1;  // substance in mole
  species $E in compartment_1 = 0;  // substance in mole

  // Reactions:
  reaction_1: $A => B; compartment_1*reaction_1_k1*A;
    reaction_1_k1 = 0.1;
  reaction_2: B => C; compartment_1*reaction_2_k1*B;
    reaction_2_k1 = 0.1;
  reaction_3: C => D; compartment_1*reaction_3_k1*C;
    reaction_3_k1 = 0.1;
  reaction_4: D => $E; compartment_1*reaction_4_k1*D;
    reaction_4_k1 = 0.1;
end
