// SBML level 3 version 1
import "QuorumTrigger.xml";

function get2DArrayElement(a, b, c)
  a;
end

model QTPop()

  // Sub-modules:
  GRID__QuorumTrigger: QuorumTrigger();

  // Compartments:
  compartment default = 1;

  // Species:
  substanceOnly species LuxI in default = 0;

  // Parameters:
  kr_f = 0.5; kr_f is "Forward repression binding rate";
  kr_r = 1; kr_r is "Reverse repression binding rate";
  ka_f = 0.0033; ka_f is "Forward activation binding rate";
  ka_r = 1; ka_r is "Reverse activation binding rate";
  kc_f = 0.05; kc_f is "Forward complex formation rate";
  kc_r = 1; kc_r is "Reverse complex formation rate";
  ko_f = 0.033; ko_f is "Forward RNAP binding rate";
  ko_r = 1; ko_r is "Reverse RNAP binding rate";
  kao_f = 1; kao_f is "Forward activated RNAP binding rate";
  kao_r = 1; kao_r is "Reverse activated RNAP binding rate";
  kmdiff_f = 1; kmdiff_f is "Forward membrane diffusion rate";
  kmdiff_r = 0.01; kmdiff_r is "Reverse membrane diffusion rate";
  kd = 0.0075; kd is "Degradation rate";
  kecd = 0.005; kecd is "Extracellular degradation rate";
  nc = 2; nc is "Stoichiometry of binding";
  nr = 30; nr is "Initial RNAP count";
  ko = 0.05; ko is "Open complex production rate";
  kb = 0.0001; kb is "Basal production rate";
  ng = 2; ng is "Initial promoter count";
  np = 10; np is "Stoichiometry of production";
  ka = 0.25; ka is "Activated production rate";
  kecdiff = 1; kecdiff is "Extracellular diffusion rate";
  QuorumTrigger__locations = ;
  QuorumTrigger_size = 16;

  // Reactions:
  Degradation_LuxI: LuxI => ; Degradation_LuxI_kecd*get2DArrayElement(LuxI, Degradation_LuxI_i, Degradation_LuxI_j);
    Degradation_LuxI_kecd = 0.005 u_1_second_n1;
  Diffusion_LuxI_Above: LuxI -> LuxI; Diffusion_LuxI_Above_kecdiff*get2DArrayElement(LuxI, Diffusion_LuxI_Above_i, Diffusion_LuxI_Above_j) - Diffusion_LuxI_Above_kecdiff*get2DArrayElement(LuxI, Diffusion_LuxI_Above_i - 1, Diffusion_LuxI_Above_j + 0);
    Diffusion_LuxI_Above_kecdiff = 1 u_1_second_n1;
  Diffusion_LuxI_Below: LuxI -> LuxI; Diffusion_LuxI_Below_kecdiff*get2DArrayElement(LuxI, Diffusion_LuxI_Below_i, Diffusion_LuxI_Below_j) - Diffusion_LuxI_Below_kecdiff*get2DArrayElement(LuxI, Diffusion_LuxI_Below_i + 1, Diffusion_LuxI_Below_j + 0);
    Diffusion_LuxI_Below_kecdiff = 1 u_1_second_n1;
  Diffusion_LuxI_Left: LuxI -> LuxI; Diffusion_LuxI_Left_kecdiff*get2DArrayElement(LuxI, Diffusion_LuxI_Left_i, Diffusion_LuxI_Left_j) - Diffusion_LuxI_Left_kecdiff*get2DArrayElement(LuxI, Diffusion_LuxI_Left_i + 0, Diffusion_LuxI_Left_j - 1);
    Diffusion_LuxI_Left_kecdiff = 1 u_1_second_n1;
  Diffusion_LuxI_Right: LuxI -> LuxI; Diffusion_LuxI_Right_kecdiff*get2DArrayElement(LuxI, Diffusion_LuxI_Right_i, Diffusion_LuxI_Right_j) - Diffusion_LuxI_Right_kecdiff*get2DArrayElement(LuxI, Diffusion_LuxI_Right_i + 0, Diffusion_LuxI_Right_j + 1);
    Diffusion_LuxI_Right_kecdiff = 1 u_1_second_n1;
  MembraneDiffusion_LuxI: LuxI -> LuxI; get2DArrayElement(kmdiff_f, MembraneDiffusion_LuxI_i, MembraneDiffusion_LuxI_j)*get2DArrayElement(LuxI, MembraneDiffusion_LuxI_i, MembraneDiffusion_LuxI_j) - get2DArrayElement(kmdiff_r, MembraneDiffusion_LuxI_i, MembraneDiffusion_LuxI_j)*get2DArrayElement(LuxI, MembraneDiffusion_LuxI_i, MembraneDiffusion_LuxI_j);

  // Unit definitions:
  unit u_1_second_n1 = 1 / second;
end
